<?xml version="1.0" encoding="UTF-8"?>
<channelml xmlns="http://morphml.org/channelml/schema" xmlns:xsi="http://www.w3.org/2001/XMLSchema-instance" xmlns:meta="http://morphml.org/metadata/schema" xsi:schemaLocation="http://morphml.org/channelml/schema   http://www.neuroml.org/NeuroMLValidator/NeuroMLFiles/Schemata/v1.8.1/Level2/ChannelML_v1.8.1.xsd" units="Physiological Units">

    <meta:notes>A cell mechanism for creating a simple integrate and fire cell</meta:notes>

    <channel_type name="IntFire">

        <meta:notes>Integrate and fire mechanism for the IF model of the granule cell.</meta:notes>

        <meta:authorList>
	  <meta:modelAuthor>
            <meta:name>Jason Rothman</meta:name>
            <meta:institution>UCL</meta:institution>
            <meta:email>j.rothman - at - ucl.ac.uk</meta:email>
          </meta:modelAuthor>
          <meta:modelTranslator>
            <meta:name>Eugenio Piasini</meta:name>
            <meta:institution>UCL</meta:institution>
            <meta:email>e.piasini - at - ucl.ac.uk</meta:email>
          </meta:modelTranslator>
        </meta:authorList>

        <current_voltage_relation>
            <integrate_and_fire threshold="-48" t_refrac="0.9" v_reset="-68" g_refrac="0.1"/>

        </current_voltage_relation>

    </channel_type>

</channelml>
