<?xml version="1.0" encoding="UTF-8"?>
<neuroml xmlns="http://www.neuroml.org/schema/neuroml2" xmlns:xsi="http://www.w3.org/2001/XMLSchema-instance" xsi:schemaLocation="http://www.neuroml.org/schema/neuroml2  https://raw.github.com/NeuroML/NeuroML2/master/Schemas/NeuroML2/NeuroML_v2beta.xsd" id="network_if_gl">

<notes>

Network structure (NeuroML 2beta) for project: if_gl saved with neuroConstruct v1.7.0 on: 00:16:17, 10-Dec-13

Cell Group: MFs contains 182 cells
Cell Group: GrCs contains 509 cells

Network connection: MFs_to_GrCs_AMPA contains 2019 individual synaptic connections
Network connection: MFs_to_GrCs_NMDA contains 2019 individual synaptic connections

</notes>

    <network id="network_if_gl">

        <extracellularProperties temperature="35.0 degC"/>

        <population id="MFs" component="ExcCell" type="populationList">
            <instance id="0">
                <location x="7.624626" y="3.5864198" z="27.329462"/>
            </instance>
            <instance id="1">
                <location x="-12.597681" y="-8.44684" z="-11.141289"/>
            </instance>
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        </population>

        <population id="GrCs" component="ExcCell" type="populationList">
            <instance id="0">
                <location x="-0.054043107" y="-0.1681916" z="-16.360792"/>
            </instance>
            <instance id="1">
                <location x="14.877292" y="3.2318518" z="0.545055"/>
            </instance>
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        </population>

        <projection id="MFs_to_GrCs_AMPA" presynapticPopulation="MFs" postsynapticPopulation="GrCs" synapse="RothmanMFToGrCAMPA">
            <connection id="0" preCellId="../MFs/73/ExcCell" postCellId="../GrCs/490/IaF_GrC"/>
            <connection id="1" preCellId="../MFs/73/ExcCell" postCellId="../GrCs/25/IaF_GrC"/>
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        </projection>

        <projection id="MFs_to_GrCs_NMDA" presynapticPopulation="MFs" postsynapticPopulation="GrCs" synapse="RothmanMFToGrCNMDA">
            <connection id="0" preCellId="../MFs/73/ExcCell" postCellId="../GrCs/490/IaF_GrC"/>
            <connection id="1" preCellId="../MFs/73/ExcCell" postCellId="../GrCs/25/IaF_GrC"/>
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        </projection>

            <!--There are no electrical inputs present in the network-->

    </network>

</neuroml>
